// SBML level 3 version 2

model biocrnpyler_459248()
  // model units - substance: mole, time: second, volume: litre, area: square_metre, length: metre, extent: mole

  // Compartments:
  compartment default = 1e-6;

  // Species:
  species dna_sfYFP in default = 0;
  species protein_sigma_machinery in default = 0;
  species protein_holoenzyme_machinery in default = 0;
  species protein_NT_nucleotide in default = 0;
  species rna_T_sfYFP in default = 0;
  species complex_dna_sfYFP_protein_holoenzyme_machinery_ in default = 0;
  species protein_AA_aminoacid in default = 0;
  species protein_sfYFP in default = 0;
  species protein_unfolded_protein_degtag in default = 0;
  species protein_peptide_chain_peptide in default = 0;
  species protein_Ct_machinery in default = 0;
  species protein_Caa_machinery in default = 0;
  species protein_Ctic_machinery in default = 0;
  species protein_C_deg_unfolded_machinery in default = 0;
  species protein_C_deg_folded_machinery in default = 0;
  species protein_RNAase_machinery in default = 0;
  species cell_count_count in default = 0;
  species complex_dna_sfYFP_protein_holoenzyme_machinery_open_ in default = 0;
  species complex_protein_RNAase_machinery_rna_T_sfYFP_ in default = 0;

  // Parameters:
  k_tx_1b__bacterial_transcription = 0.05061;
  k_tx_1u__bacterial_transcription = 14.081;
  RNAP_max__bacterial_transcription = 1960;
  n_gamma_RNAP__bacterial_transcription = 0.23;
  c_max__logistic_cell_growth = 5.036667e8 dimensionless;
  k_tx_2b__bacterial_transcription = 0.0019382;
  k_tx_2u__bacterial_transcription = 0.09999;
  b_tx_4u__mrna_degradation = 1 dimensionless;
  n_delta__bacterial_transcription = 5.5 dimensionless;
  k_tx_3__bacterial_transcription = 0.003597;
  k_tl_1b__bacterial_translation = 0.002793;
  k_tl_1u__bacterial_translation = 11.48224;
  Et_max__bacterial_translation = 1090;
  n_gamma_Et__bacterial_translation = 0.37;
  k_tl_2b__bacterial_translation = 8.24109;
  k_tl_2u__bacterial_translation = 35.1135;
  tRNA_max__bacterial_translation = 1535;
  n_gamma_tRNA__bacterial_translation = 0.6;
  k_tl_3b__bacterial_translation = 0.04287;
  k_tl_3u__bacterial_translation = 12.3438;
  Ribo_max__bacterial_translation = 280;
  n_gamma_Ribo__bacterial_translation = 0.67;
  k_tl_4__bacterial_translation = 0.17;
  k_tl_5__bacterial_translation = 0.1;
  b_tl_5__bacterial_translation = 0.5 dimensionless;
  n_gamma_folding__bacterial_translation = 0.26;
  k_tl_8__bacterial_translation = 138;
  n_gamma_syn__bacterial_translation = 0.296;
  k_tl_10__bacterial_translation = 0.0001;
  k_tl_9b_P__bacterial_translation = 0.000454;
  k_tl_9u__bacterial_translation = 10.2873;
  Protease_max__bacterial_translation = 850;
  n_gamma_Protease__bacterial_translation = 0.455;
  k_tl_6__bacterial_translation = 0.39;
  k_tl_9b_Pm__bacterial_translation = 0.01671;
  k__logistic_cell_growth = 0.015781;
  k_tx_4b__mrna_degradation = 2.54926;
  k_tx_4u__mrna_degradation = 161.36218;
  n_delta__mrna_degradation = 5.5 dimensionless;
  k_tx_5__mrna_degradation = 0.42521;
  k_tl_7__non_tag_degradation = 0.0008;
  n_delta__non_tag_degradation = 5.5 dimensionless;

  // Reactions:
  r0: protein_sigma_machinery => protein_holoenzyme_machinery; k_tx_1b__bacterial_transcription*protein_sigma_machinery*(RNAP_max__bacterial_transcription*(cell_count_count/c_max__logistic_cell_growth*(1 - cell_count_count/c_max__logistic_cell_growth))^n_gamma_RNAP__bacterial_transcription - protein_holoenzyme_machinery) - k_tx_1u__bacterial_transcription*protein_holoenzyme_machinery;  // modifiers: cell_count_count
  r1: protein_holoenzyme_machinery + dna_sfYFP => complex_dna_sfYFP_protein_holoenzyme_machinery_open_; k_tx_2b__bacterial_transcription*protein_holoenzyme_machinery*dna_sfYFP;
  r2: complex_dna_sfYFP_protein_holoenzyme_machinery_open_ => protein_holoenzyme_machinery + dna_sfYFP; k_tx_2u__bacterial_transcription*complex_dna_sfYFP_protein_holoenzyme_machinery_open_*((cell_count_count/c_max__logistic_cell_growth)^n_delta__bacterial_transcription/(1 + (cell_count_count/c_max__logistic_cell_growth)^n_delta__bacterial_transcription) + b_tx_4u__mrna_degradation);  // modifiers: cell_count_count
  r3: protein_NT_nucleotide + complex_dna_sfYFP_protein_holoenzyme_machinery_open_ => dna_sfYFP + rna_T_sfYFP + protein_sigma_machinery; k_tx_3__bacterial_transcription*protein_NT_nucleotide*complex_dna_sfYFP_protein_holoenzyme_machinery_open_;
  r4: protein_AA_aminoacid => protein_Ct_machinery; k_tl_1b__bacterial_translation*protein_AA_aminoacid*(Et_max__bacterial_translation*(cell_count_count/c_max__logistic_cell_growth*(1 - cell_count_count/c_max__logistic_cell_growth))^n_gamma_Et__bacterial_translation - protein_Ct_machinery) - k_tl_1u__bacterial_translation*protein_Ct_machinery;  // modifiers: cell_count_count
  r5: protein_Ct_machinery => protein_Caa_machinery; k_tl_2b__bacterial_translation*protein_Ct_machinery*(tRNA_max__bacterial_translation*(cell_count_count/c_max__logistic_cell_growth*(1 - cell_count_count/c_max__logistic_cell_growth))^n_gamma_tRNA__bacterial_translation - protein_Caa_machinery);  // modifiers: cell_count_count
  r6: rna_T_sfYFP => protein_Ctic_machinery; k_tl_3b__bacterial_translation*rna_T_sfYFP*(Ribo_max__bacterial_translation*(cell_count_count/c_max__logistic_cell_growth*(1 - cell_count_count/c_max__logistic_cell_growth))^n_gamma_Ribo__bacterial_translation - protein_Ctic_machinery) - k_tl_3u__bacterial_translation*protein_Ctic_machinery;  // modifiers: cell_count_count
  r7: protein_Caa_machinery + protein_Ctic_machinery => rna_T_sfYFP + protein_unfolded_protein_degtag; k_tl_4__bacterial_translation*protein_Caa_machinery*protein_Ctic_machinery;
  r8: protein_unfolded_protein_degtag => protein_sfYFP; k_tl_5__bacterial_translation*protein_unfolded_protein_degtag*(cell_count_count/c_max__logistic_cell_growth*(1 - cell_count_count/c_max__logistic_cell_growth)^n_gamma_folding__bacterial_translation + b_tl_5__bacterial_translation);  // modifiers: cell_count_count
  r9: => protein_AA_aminoacid; k_tl_8__bacterial_translation*((1 - cell_count_count/c_max__logistic_cell_growth)*(cell_count_count/c_max__logistic_cell_growth))^n_gamma_syn__bacterial_translation;  // modifiers: cell_count_count
  r10: protein_peptide_chain_peptide => protein_AA_aminoacid; k_tl_10__bacterial_translation*protein_peptide_chain_peptide;
  r11: protein_unfolded_protein_degtag => protein_C_deg_unfolded_machinery; k_tl_9b_P__bacterial_translation*protein_unfolded_protein_degtag*(Protease_max__bacterial_translation*(cell_count_count/c_max__logistic_cell_growth*(1 - cell_count_count/c_max__logistic_cell_growth))^n_gamma_Protease__bacterial_translation - (protein_C_deg_unfolded_machinery + protein_C_deg_folded_machinery)) - k_tl_9u__bacterial_translation*protein_C_deg_unfolded_machinery;  // modifiers: cell_count_count, protein_C_deg_folded_machinery
  r12: protein_C_deg_unfolded_machinery => protein_peptide_chain_peptide; k_tl_6__bacterial_translation*protein_C_deg_unfolded_machinery;
  r13: protein_sfYFP => protein_C_deg_folded_machinery; k_tl_9b_Pm__bacterial_translation*protein_sfYFP*(Protease_max__bacterial_translation*(cell_count_count/c_max__logistic_cell_growth*(1 - cell_count_count/c_max__logistic_cell_growth))^n_gamma_Protease__bacterial_translation - (protein_C_deg_unfolded_machinery + protein_C_deg_folded_machinery)) - k_tl_9u__bacterial_translation*protein_C_deg_folded_machinery;  // modifiers: cell_count_count, protein_C_deg_unfolded_machinery
  r14: protein_C_deg_folded_machinery => protein_peptide_chain_peptide; k_tl_6__bacterial_translation*protein_C_deg_folded_machinery;
  r15: => cell_count_count; k__logistic_cell_growth*cell_count_count*(1 - cell_count_count/c_max__logistic_cell_growth);
  r16: rna_T_sfYFP + protein_RNAase_machinery => complex_protein_RNAase_machinery_rna_T_sfYFP_; k_tx_4b__mrna_degradation*rna_T_sfYFP*protein_RNAase_machinery;
  r17: complex_protein_RNAase_machinery_rna_T_sfYFP_ => rna_T_sfYFP + protein_RNAase_machinery; k_tx_4u__mrna_degradation*complex_protein_RNAase_machinery_rna_T_sfYFP_*((cell_count_count/c_max__logistic_cell_growth)^n_delta__mrna_degradation/(1 + (cell_count_count/c_max__logistic_cell_growth)^n_delta__mrna_degradation) + b_tx_4u__mrna_degradation);  // modifiers: cell_count_count
  r18: complex_protein_RNAase_machinery_rna_T_sfYFP_ => protein_RNAase_machinery + protein_NT_nucleotide; k_tx_5__mrna_degradation*complex_protein_RNAase_machinery_rna_T_sfYFP_;
  r19: protein_sfYFP => protein_peptide_chain_peptide; k_tl_7__non_tag_degradation*protein_sfYFP*((cell_count_count/c_max__logistic_cell_growth)^n_delta__non_tag_degradation/(1 + (cell_count_count/c_max__logistic_cell_growth)^n_delta__non_tag_degradation));  // modifiers: cell_count_count
  r20: protein_unfolded_protein_degtag => protein_peptide_chain_peptide; k_tl_7__non_tag_degradation*protein_unfolded_protein_degtag*((cell_count_count/c_max__logistic_cell_growth)^n_delta__non_tag_degradation/(1 + (cell_count_count/c_max__logistic_cell_growth)^n_delta__non_tag_degradation));  // modifiers: cell_count_count
  r21: rna_T_sfYFP => ; k__logistic_cell_growth*rna_T_sfYFP*(1 - cell_count_count/c_max__logistic_cell_growth);  // modifiers: cell_count_count
  r22: protein_AA_aminoacid => ; k__logistic_cell_growth*protein_AA_aminoacid*(1 - cell_count_count/c_max__logistic_cell_growth);  // modifiers: cell_count_count
  r23: protein_sfYFP => ; k__logistic_cell_growth*protein_sfYFP*(1 - cell_count_count/c_max__logistic_cell_growth);  // modifiers: cell_count_count
  r24: protein_unfolded_protein_degtag => ; k__logistic_cell_growth*protein_unfolded_protein_degtag*(1 - cell_count_count/c_max__logistic_cell_growth);  // modifiers: cell_count_count
  r25: protein_peptide_chain_peptide => ; k__logistic_cell_growth*protein_peptide_chain_peptide*(1 - cell_count_count/c_max__logistic_cell_growth);  // modifiers: cell_count_count

  // Unit definitions:
  unit square_metre = metre^2;
end
